<?xml version="1.0"?>
<!--
    File:     ft_250.xml
    Author:   Simulation Team
	Link to JSBSim Engine Description: http://wiki.flightgear.org/JSBSim_Engines

    Inputs:
        name:           ft_250
        type:           turbine
        thrust:         250 N
        augmented?      no
        injected?       no
-->

<turbine_engine name="ft_250">
  <milthrust unit="N"> 250 </milthrust>
  <maxthrust unit="N"> 400 </maxthrust>
  <bypassratio>     0.5 </bypassratio>
  <tsfc>            0.74 </tsfc>
  <atsfc>           2.05 </atsfc>
  <bleed>           0.03</bleed>
  <idlen1>         40.0 </idlen1>
  <idlen2>         53.0 </idlen2>
  <n1spinup>        1.0 </n1spinup>    <!-- Fan rotor rpm starter acceleration (default 1.0) -->
  <n2spinup>        3.0 </n2spinup>    <!-- Core rotor rpm starter acceleration (default 3.0) -->
  <maxn1>         100.0 </maxn1>
  <maxn2>         100.0 </maxn2>
  <augmented>         1 </augmented>
  <augmethod>         0 </augmethod>
  <injected>          0 </injected>

  <function name="IdleThrust">
   <table>
    <independentVar lookup="row">velocities/mach</independentVar>
    <independentVar lookup="column">atmosphere/density-altitude</independentVar>
    <tableData>
            0     1000    2000    3000    4000    5000
     0.0  0.0320  0.0320  0.0320  0.0320  0.0320  0.0320
     0.2  0.0320  0.0320  0.0320  0.0320  0.0320  0.0320
     0.4  0.0320  0.0320  0.0320  0.0320  0.0320  0.0320
     0.6  0.0320  0.0320  0.0320  0.0320  0.0320  0.0320
     0.8  0.0320  0.0320  0.0320  0.0320  0.0320  0.0320
     1.0  0.0320  0.0320  0.0320  0.0320  0.0320  0.0320
    </tableData>
   </table>
  </function>

  <function name="MilThrust">
   <table>
    <independentVar lookup="row">velocities/mach</independentVar>
    <independentVar lookup="column">atmosphere/density-altitude</independentVar>
    <tableData>
            0     1000    2000    3000    4000    5000
     0.0  001.00  000.88  000.80  000.72  000.64  000.56
     0.2  000.88  000.80  000.72  000.64  000.56  000.56
     0.4  000.88  000.88  000.72  000.64  000.56  000.56
     0.6  000.88  000.80  000.80  000.72  000.64  000.56
     0.8  000.96  000.96  000.88  000.80  000.72  000.64
     1.0  001.20  001.12  000.96  000.88  000.80  000.80
     1.2  001.36  001.28  001.20  001.04  000.96  000.88
    </tableData>
   </table>
  </function>

  <!-- Note: AugThrust data is from ja37 -->
  <function name="AugThrust">
   <table>
    <independentVar lookup="row">velocities/mach</independentVar>
    <independentVar lookup="column">atmosphere/density-altitude</independentVar>
    <tableData>
           -10000       0   10000   20000   30000   40000   50000   60000
     0.0    1.1816  1.0000  0.8184  0.6627  0.5280  0.3756  0.2327  0.0
     0.2    1.1308  0.9599  0.7890  0.6406  0.5116  0.3645  0.2258  0.0
     0.4    1.1150  0.9474  0.7798  0.6340  0.5070  0.3615  0.2240  0.0
     0.6    1.1284  0.9589  0.7894  0.6420  0.5134  0.3661  0.2268  0.0
     0.8    1.1707  0.9942  0.8177  0.6647  0.5309  0.3784  0.2345  0.0
     1.0    1.2411  1.0529  0.8648  0.7017  0.5596  0.3983  0.2467  0.0
     1.2    1.3287  1.1254  0.9221  0.7462  0.5936  0.4219  0.2614  0.0
     1.4    1.4365  1.2149  0.9933  0.8021  0.6360  0.4509  0.2794  0.0
     1.6    1.5711  1.3260  1.0809  0.8700  0.6874  0.4860  0.3011  0.0
     1.8    1.7301  1.4579  1.1857  0.9512  0.7495  0.5289  0.3277  0.0
     2.0    1.8314  1.5700  1.3086  1.0474  0.8216  0.5786  0.3585  0.0
     2.2    1.9700  1.6900  1.4100  1.2400  0.9100  0.6359  0.3940  0.0
     2.4    2.0700  1.8000  1.5300  1.3400  1.0000  0.7200  0.4600  0.0
     2.6    2.2000  1.9200  1.6400  1.4400  1.1000  0.8000  0.5200  0.0
    </tableData>
   </table>
  </function>

</turbine_engine>
